*HEADING
Plate Analysis
*NODE
1, 0.0, 0.0, 0.0
2, 100.0, 0.0, 0.0
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*ELEMENT, TYPE=S8, ELSET=EALL
1, 1217, 1359, 1363, 1362, 3937, 3938, 3939, 3940
2, 1359, 1276, 1360, 1363, 3942, 3943, 3944, 3938
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*MATERIAL, NAME=MAT1
*ELASTIC
72400.0, 0.33
*SHELL SECTION, ELSET=EALL, MATERIAL=MAT1
2.0
*BOUNDARY
*STEP
*STATIC
*CLOAD
*NODE FILE
U
*EL FILE
S
*END STEP
